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/batch
! ANSYS input file written by Workbench version 2021 R2
! File used for geometry attach: C:\Users\adamc\Documents\GrabCAD\Spaceshot\components\upper-section-assembly\components\avionics-bay-assembly\components\cots-altimeter-mount-assembly\components\cots-altimeter-mount_L-bracket.stp
/title,wbnew--Static Structural (A5)
/com,--- Data in consistent MKS units. See Solving Units in the help system for more information.
/units,MKS
/prep7
! Turn off shape checking because checks already performed inside WB mesher.
! See help system for more information.
SHPP,OFF,,NOWARN
etcon,set             ! allow ANSYS to choose best KEYOP's for 180x elements, resets any applicable keyopt to MAPDL defaults
/com,*********** Nodes for the whole assembly ***********
nblock,3,,7497
(1i9,3e20.9e3)
        1     4.178260039E-02     3.564230799E-02     9.900000000E-02
        2     4.178260039E-02     3.564230799E-02     8.000000000E-03
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-1
/com,*********** Elements for Body 1 "cots-altimeter-mount_L-bracket-FreeParts|Extrude (39)" ***********
et,1,187
eblock,19,solid,,3374
(19i9)
        1        1        1        1        0        0        0        0       10        0        1      547     1154     1077     1136     4558     6740     4556     4557
     6810     6738
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-1
/com,*********** Send User Defined Coordinate System(s) ***********
csys,0
toffst,273.15,  ! Temperature offset from absolute zero
/com,*********** Set Reference Temperature ***********
tref,22.
/com,*********** Send Materials ***********
Temperature = 'TEMP' ! Temperature
MP,DENS,1,1030,	! kg m^-3
MP,EX,1,1628000000,	! Pa
MP,NUXY,1,0.4089,
MP,ALPX,1,0.000184,	! C^-1
MP,KXX,1,0.1997,	! W m^-1 C^-1
MP,C,1,1400,	! J kg^-1 C^-1

!************************* Model Summary ********************
!cots-altimeter-mount_L-bracket-FreeParts|Extrude (39),	Plastic, ABS (high-impact),	matid,	1
!************************* End Model Summary ********************
/com,*********** Fixed Supports ***********
CMBLOCK,_FIXEDSU,NODE,       30
(8i10)
       433       434       435       436       437       438       439       440
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cmsel,s,_FIXEDSU
d,all,all
nsel,all
/com,*********** Define Force Using Surface Effect Elements ***********
local,12,0,0.,0.,0.,0.,0.,0.
csys,0
et,2,154
eblock,10,,,62
(15i9)
     5557        2        2        2       12      379      395      383      383     3678     3704      383     3676
     5558        2        2        2       12      381      384      402      402     3690     3707      402     3692
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-1
esel,s,type,,2
keyop,2,2,1                ! Apply load in local coordinate system
keyop,2,7,1                ! Use original area so load is constant in large deformation
esel,all

*DIM,_loadvari31x,TABLE,2,1,1,TIME
! Time values
*TAXIS,_loadvari31x(1),1,0.,1.
! Load values
_loadvari31x(1,1,1) = 0.
_loadvari31x(2,1,1) = 0.


*DIM,_loadvari31y,TABLE,2,1,1,TIME
! Time values
*TAXIS,_loadvari31y(1),1,0.,1.
! Load values
_loadvari31y(1,1,1) = 0.
_loadvari31y(2,1,1) = 0.


*DIM,_loadvari31z,TABLE,2,1,1,TIME
! Time values
*TAXIS,_loadvari31z(1),1,0.,1.
! Load values
_loadvari31z(1,1,1) = -11490.1745991364
_loadvari31z(2,1,1) = -11490.1745991364


/com,*********** Define Force Using Surface Effect Elements ***********
local,13,0,0.,0.,0.,0.,0.,0.
csys,0
et,3,154
eblock,10,,,73
(15i9)
     5619        3        3        3       13      991     1002      998      998     6490     6523      998     6489
     5620        3        3        3       13      291      306      295      295     3162     3182      295     3161
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-1
esel,s,type,,3
keyop,3,2,1                ! Apply load in local coordinate system
keyop,3,7,1                ! Use original area so load is constant in large deformation
esel,all

*DIM,_loadvari33x,TABLE,2,1,1,TIME
! Time values
*TAXIS,_loadvari33x(1),1,0.,1.
! Load values
_loadvari33x(1,1,1) = 0.
_loadvari33x(2,1,1) = 0.


*DIM,_loadvari33y,TABLE,2,1,1,TIME
! Time values
*TAXIS,_loadvari33y(1),1,0.,1.
! Load values
_loadvari33y(1,1,1) = 0.
_loadvari33y(2,1,1) = 0.


*DIM,_loadvari33z,TABLE,2,1,1,TIME
! Time values
*TAXIS,_loadvari33z(1),1,0.,1.
! Load values
_loadvari33z(1,1,1) = -8486.34265359041
_loadvari33z(2,1,1) = -8486.34265359041


/com,*********** Define Force Using Surface Effect Elements ***********
local,14,0,0.,0.,0.,0.,0.,0.
csys,0
et,4,154
eblock,10,,,16
(15i9)
     5692        4        4        4       14      269      276      278      278     3035     3087      278     3036
     5693        4        4        4       14      278      284      269      269     3099     3037      269     3036
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-1
esel,s,type,,4
keyop,4,2,1                ! Apply load in local coordinate system
keyop,4,7,1                ! Use original area so load is constant in large deformation
esel,all

*DIM,_loadvari35x,TABLE,2,1,1,TIME
! Time values
*TAXIS,_loadvari35x(1),1,0.,1.
! Load values
_loadvari35x(1,1,1) = 0.
_loadvari35x(2,1,1) = 0.


*DIM,_loadvari35y,TABLE,2,1,1,TIME
! Time values
*TAXIS,_loadvari35y(1),1,0.,1.
! Load values
_loadvari35y(1,1,1) = 0.
_loadvari35y(2,1,1) = 0.


*DIM,_loadvari35z,TABLE,2,1,1,TIME
! Time values
*TAXIS,_loadvari35z(1),1,0.,1.
! Load values
_loadvari35z(1,1,1) = -231100.496206011
_loadvari35z(2,1,1) = -231100.496206011


fini
/com,****************************************************************************
/com,*************************    SOLUTION       ********************************
/com,****************************************************************************
/solu
antype,0                   ! static analysis
_thickRatio=  0     ! Ratio of thick parts in the model
eqsl,sparse,,,,,1
cntr,print,1               ! print out contact info and also make no initial contact an error
dmpoption,emat,no             ! Don't combine emat file for DANSYS
dmpoption,esav,no             ! Don't combine esav file for DANSYS
nldiag,cont,iter           ! print out contact info each equilibrium iteration
rescontrol,,none                 ! Do not keep any restart files
/com,****************************************************
/com,******************* SOLVE FOR LS 1 OF 1 ****************
esel,s,type,,2
nsle
sfe,all,1,pres,1,%_loadvari31x%
sfe,all,2,pres,1,%_loadvari31y%
sfe,all,3,pres,1,%_loadvari31z%
esel,s,type,,3
nsle
sfe,all,1,pres,1,%_loadvari33x%
sfe,all,2,pres,1,%_loadvari33y%
sfe,all,3,pres,1,%_loadvari33z%
esel,s,type,,4
nsle
sfe,all,1,pres,1,%_loadvari35x%
sfe,all,2,pres,1,%_loadvari35y%
sfe,all,3,pres,1,%_loadvari35z%
nsel,all
esel,all
nsub,1,1,1
time,1.
outres,erase
outres,all,none
outres,nsol,all,
outres,rsol,all
outres,eangl,all
outres,etmp,all
outres,veng,all
outres,strs,all,
outres,epel,all,
outres,eppl,all,
outres,cont,all,
! *********** WB SOLVE COMMAND ***********
! check interactive state
*get,ANSINTER_,active,,int
*if,ANSINTER_,ne,0,then
/eof
*endif
solve
/com *************** Write FE CONNECTORS *********
CEWRITE,file,ce,,INTE
/com,****************************************************
/com,*************** FINISHED SOLVE FOR LS 1 *************
/post1
fini
